# OpenSim document version 40000
MarkerSet:
  Marker C7: torso (-0.07 0.44 0)
  Marker JN: torso (0.04 0.375 0)
  Marker LSHO: torso (-0.01 0.42 -0.14)
  Marker RSHO: torso (-0.01 0.42 0.14)
  Marker XIPH: torso (0.105 0.23 0)
  Marker RBACK: torso (-0.105 0.28 0.1)
  Marker T10: torso (-0.1 0.22 0)
  Marker RUARM: humerus_r (0.002845 -0.140345 0.021)
  Marker RLELB: humerus_r (0.00729 -0.2878 0.034)
  Marker RMELB: humerus_r (0.00175 -0.295 -0.04)
  Marker RFARM: ulna_r (-0.03 -0.135 0.03)
  Marker RLWRI: radius_r (-0.007572 -0.24052 0.048512)
  Marker RMWRI: ulna_r (-0.017299 -0.250527 0.006595)
  Marker RWJC: radius_r (-0.01 -0.23187 0.017)
  Marker RMC2: hand_r (-0.013775 -0.0760046 0.0156612)
  Marker RMC5: hand_r (-0.013775 -0.063 -0.03)
  Marker LUARM: humerus_l (-0.002845 -0.140345 -0.021)
  Marker LLELB: humerus_l (0.00729 -0.2878 -0.034)
  Marker LMELB: humerus_l (0.00175 -0.295 0.04)
  Marker LFARM: ulna_l (-0.03 -0.135 -0.03)
  Marker LLWRI: radius_l (-0.007572 -0.24052 -0.048512)
  Marker LMWRI: ulna_l (-0.017299 -0.250527 -0.006595)
  Marker LMC2: hand_l (-0.013775 -0.0760046 -0.0156612)
  Marker LMC5: hand_l (-0.013775 -0.063 0.03)
  Marker RASIS: pelvis (0.02 0.03 0.128)
  Marker LASIS: pelvis (0.02 0.03 -0.128)
  Marker RPSIS: pelvis (-0.175 0.03 0.045)
  Marker LPSIS: pelvis (-0.175 0.03 -0.045)
  Marker LGTR: femur_l (-0.0184789 -0.0239877 -0.08)
  Marker RGTR: femur_r (-0.0184789 -0.0239877 0.08)
  Marker RTHI1: femur_r (0.08 -0.2 -0.01)
  Marker RTHI2: femur_r (0.075 -0.3 0.02)
  Marker RTHI3: femur_r (0.018 -0.18 0.08)
  Marker RTHI4: femur_r (-0.07 -0.22 0.015)
  Marker RTHI5: femur_r (-0.065 -0.285 -0.015)
  Marker RLKNE: femur_r (0 -0.43 0.05)
  Marker RMKNE: femur_r (0 -0.43 -0.05)
  Marker RSHA1: tibia_r (0.05 -0.18 0)
  Marker RSHA2: tibia_r (0.04 -0.25 0.025)
  Marker RSHA3: tibia_r (-0.01 -0.16 0.07)
  Marker RSHA4: tibia_r (-0.06 -0.15 0.01)
  Marker RSHA5: tibia_r (-0.05 -0.25 -0.02)
  Marker RLANK: tibia_r (-0.005 -0.41 0.053)
  Marker RMANK: tibia_r (0.006 -0.4 -0.038)
  Marker RHEEL: calcn_r (-0.02 0.02 0)
  Marker RMT1: calcn_r (0.185 0.006 -0.05)
  Marker RMT5: calcn_r (0.14 0.01 0.06)
  Marker LTHI1: femur_l (0.08 -0.2 0.01)
  Marker LTHI2: femur_l (0.075 -0.3 -0.02)
  Marker LTHI3: femur_l (0.018 -0.18 -0.08)
  Marker LTHI4: femur_l (-0.07 -0.22 -0.015)
  Marker LTHI5: femur_l (-0.065 -0.285 0.015)
  Marker LLKNE: femur_l (0 -0.43 -0.05)
  Marker LMKNE: femur_l (0 -0.43 0.05)
  Marker LSHA1: tibia_l (0.05 -0.18 0)
  Marker LSHA2: tibia_l (0.04 -0.25 -0.025)
  Marker LSHA3: tibia_l (-0.01 -0.16 -0.07)
  Marker LSHA4: tibia_l (-0.06 -0.15 -0.01)
  Marker LSHA5: tibia_l (-0.05 -0.25 0.02)
  Marker LLANK: tibia_l (-0.005 -0.41 -0.053)
  Marker LMANK: tibia_l (0.006 -0.4 0.038)
  Marker LHEEL: calcn_l (-0.02 0.02 0)
  Marker LMT1: calcn_l (0.185 0.006 0.05)
  Marker LMT5: calcn_l (0.14 0.01 -0.06)
