# OpenSim document version 40000
MarkerSet anthropometric_stations:
  Marker euryon_r: torso (-0.0015 0.595 0.069)
  Marker euryon_l: torso (-0.0015 0.595 -0.069)
  Marker glabella: torso (0.08 0.58 0)
  Marker opisthocranion: torso (-0.08 0.56 0)
  Marker vertex: torso (0 0.65 0)
  Marker acromion_r: torso (0.005 0.4 0.165)
  Marker acromion_l: torso (0.005 0.4 -0.165)
  Marker suprasternale: torso (0.03 0.365 0)
  Marker cervicale: torso (-0.065 0.415 0)
  Marker iliocrestale_r: pelvis (-0.05 0.082 0.11)
  Marker iliocrestale_l: pelvis (-0.05 0.082 -0.11)
  Marker posterior_omphalion: pelvis (-0.14 0.11 0)
  Marker anterior_omphalion: pelvis (0 0.11 0)
  Marker lateral_malleolus_r: tibia_r (-0.005 -0.41 0.042)
  Marker lateral_malleolus_l: tibia_l (-0.005 -0.41 -0.042)
  Marker medial_malleolus_r: tibia_r (0.008 -0.405 -0.022)
  Marker medial_malleolus_l: tibia_l (0.008 -0.405 0.022)
  Marker tibiale_r: tibia_r (0.008 -0.039 -0.026)
  Marker tibiale_l: tibia_l (0.008 -0.039 0.026)
  Marker trochanterion_r: femur_r (-0.0175 -0.022 0.06)
  Marker trochanterion_l: femur_l (-0.0175 -0.022 -0.06)
  Marker pternion_r: calcn_r (-0.004 0.013 -0.003)
  Marker pternion_l: calcn_l (-0.004 0.013 0.003)
  Marker acropodion_r: calcn_r (0.25 -0.0027 -0.016)
  Marker acropodion_l: calcn_l (0.25 -0.0027 0.016)
  Marker mtp1_r: calcn_r (0.141 0 0.047)
  Marker mtp1_l: calcn_l (0.141 0 -0.047)
  Marker mtp5_r: calcn_r (0.185 0.001 -0.0345)
  Marker mtp5_l: calcn_l (0.185 0.001 0.0345)
  Marker radiale_r: radius_r (0 -0.004 0.006)
  Marker radiale_l: radius_l (0 -0.004 -0.006)
  Marker stylion_r: radius_r (-0.002 -0.233 0.035)
  Marker stylion_l: radius_l (-0.002 -0.233 -0.035)
  Marker olecranon_r: ulna_r (-0.03 -0.001 0)
  Marker olecranon_l: ulna_l (-0.03 -0.001 0)
